units		real
atom_style	full

pair_style	lj/cut/coul/long 12.0 12.0
pair_modify tail no
kspace_style  ewald 5e-5
kspace_modify gewald 0.22663515650875032 kmax/ewald 19 19 19

bond_style	harmonic
angle_style	harmonic
dihedral_style	none
improper_style	none

read_data	data.methanol_single_molecule

special_bonds   lj/coul 0.0 0.0 0.0

neighbor        2.0 bin
neigh_modify	every 1 delay 10 check yes

fix		2 all nvt temp 300.0 300.0 100.0

velocity        all zero linear units box

timestep	2.0

thermo_style    custom step etotal evdwl ecoul ebond eangle edihed elong etail ke
thermo		1

run		0
